@DSL Implicit;
@Behaviour StandardElasticityBrick;
@Author Thomas Nagel;
@Date 05/02/2019;

@Algorithm NewtonRaphson;


@Brick StandardElasticity;

@Theta 1.;       // time integration scheme
@Epsilon 1e-14;  // tolerance of local stress integration algorithm
@ModellingHypotheses{".+"};

@RequireStiffnessTensor<UnAltered>;

@Integrator
{
}
